*Heading
** Job name: rail-800 Model name: Model-1
** Generated by: Abaqus/CAE Student Edition 6.14-2
*Preprint, echo=NO, model=NO, history=NO, contact=NO
**
** PARTS
**
*Part, name=Szyna2D
*End Part
**
**
** ASSEMBLY
**
*Assembly, name=Assembly
**
*Instance, name=Szyna2D-1, part=Szyna2D
*Node
      1, -0.074414216, 0.000585786416
      2, -0.0730000138,           0.
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*Element, type=DC2D3
 1, 162, 508, 509
 2, 791, 470, 321
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*Element, type=DC2D4
 27, 325,   1,   2, 781
 28, 796, 784, 783, 468
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*Nset, nset=cala, generate
   1,  864,    1
*Elset, elset=cala, generate
   1,  776,    1
*Elset, elset=_glowka_S1, internal
 154, 156, 157, 190, 194, 377
*Elset, elset=_glowka_S2, internal
   8, 155, 159, 162, 172, 173, 384, 424, 428, 431, 434, 436, 437, 759
*Elset, elset=_glowka_S4, internal
 137, 138, 139, 143, 158, 163
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*Elset, elset=_glowka_S3, internal
 140, 144, 145
*Surface, type=ELEMENT, name=glowka
_glowka_S1, S1
_glowka_S2, S2
_glowka_S4, S4
_glowka_S3, S3
*Elset, elset=_stopka_S2, internal
  27,  31,  33,  45,  47,  49
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*Elset, elset=_stopka_S3, internal
  18,  19,  31,  34,  52,  85
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*Elset, elset=_stopka_S4, internal
  29,  30,  36,  37,  39,  40
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*Elset, elset=_stopka_S1, internal
  51, 129, 221, 223, 231, 308, 358, 360, 361, 391, 399, 406, 410, 423, 465
*Surface, type=ELEMENT, name=stopka
_stopka_S2, S2
_stopka_S3, S3
_stopka_S4, S4
_stopka_S1, S1
** Section: Sekcja-stal
*Solid Section, elset=cala, material=Stal
,
*End Instance
**
*Nset, nset=coolingPoint, instance=Szyna2D-1
 365,
*Elset, elset=_Calosc_S2, internal, instance=Szyna2D-1
   8,  27,  31,  33,  45,  47
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*Elset, elset=_Calosc_S3, internal, instance=Szyna2D-1
  18,  19,  31,  34,  52,  85
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*Elset, elset=_Calosc_S4, internal, instance=Szyna2D-1
  29,  30,  36,  37,  39,  40
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*Elset, elset=_Calosc_S1, internal, instance=Szyna2D-1
  51, 129, 154, 156, 157, 190
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*Surface, type=ELEMENT, name=Calosc
_Calosc_S2, S2
_Calosc_S3, S3
_Calosc_S4, S4
_Calosc_S1, S1
*End Assembly
*Amplitude, name="K= 800"
0.,            800.,
100.,            800.,
103.,             10.,
115.,             10.
118.,            800.,
123.,            800.,
126.,             10.,
155.,             10.
158.,            800.,
161.,            800.,
164.,             10.,
2400.,             10.
**
** MATERIALS
**
*Material, name=Stal
*Conductivity
58.,
*Density
7800.,
*Specific Heat
460.,
**
** PHYSICAL CONSTANTS
**
*Physical Constants, absolute zero=-273., stefan boltzmann=5.67e-08
**
** PREDEFINED FIELDS
**
** Name: Predefined Temperature   Type: Temperature
*Initial Conditions, type=TEMPERATURE
Szyna2D-1.cala, 820.
** ----------------------------------------------------------------
**
** STEP: Chlodzenie
**
*Step, name=Chlodzenie, nlgeom=NO, inc=10000
Cooling
*Heat Transfer, end=PERIOD, deltmx=1e+06
0.01, 1200., 0.003, 1.,
**
** INTERACTIONS
**
** Interaction: Chlodzenie glowki
*Sfilm, film amplitude="K= 800"
Szyna2D-1.glowka, F, 20., 1.
** Interaction: Chlodzenie w powietrzu
*Sfilm
Szyna2D-1.stopka, F, 20., 10.
** Interaction: Radiacja
*Sradiate
Calosc, R, 20., 0.5
**
** OUTPUT REQUESTS
**
*Restart, write, frequency=0
**
** FIELD OUTPUT: F-Output-1
**
*Output, field
*Node Output
NT, RFL
*Element Output, directions=YES
HFL, TEMP
*NODE PRINT, NSET=coolingPoint , FREQUENCY=1
NT
*Output, history, frequency=0
*End Step
